// COMSOL Multiphysics 4.3 (Build: 151) model "telegraph2.mph"
// Outline of the model tree
// Unit system: none

Parameters
  c = 1  // Transport velocity
  alpha = 0.25  // PDE coefficient parameter alpha
  beta = 0.25  // PDE coefficient parameter beta

Geometry
  geom1 "Geometry 1" (1D, length unit m)
    i1: Interval | p = 0, 1
    fin: Finalize "Form Union"

Physics
  c: CoefficientFormPDE on all domains
    dependent variable u
    cfeq1: CoefficientFormPDE (default) | c = c*c; a = alpha*beta; f = -(alpha+beta)*ut; ea = 1; da = 0
    zflx1: ZeroFluxBoundary "Zero Flux 1" (default)
    init1: init "Initial Values 1" (default) | u = exp(-3*(x/0.2-1)^2)

Mesh
  mesh1 "Mesh 1" (physics-controlled)
    size: MeshSizeDefault | hauto = 3

Studies
  std1 "Study 1"
    param: Parametric "Parametric Sweep" | pname = {alpha, beta}; plistarr = {0.25 0.5 1 2, 0.25 0.5 1 2}
    time: Transient "Time Dependent" | tlist = range(0,0.1,1)

Solver configurations
  sol1 "Solver 1" (study std1)
    v1: Variables "Dependent Variables 1"
    t1: Time "Time-Dependent Solver 1" | tlist = range(0,0.1,1); timemethod = genalpha
      dDef: Direct
      fc1: FullyCoupled
  sol2 "Parametric 2" (study std1)

Datasets
  dset1: Solution | solution = sol1
  dset2: Solution | solution = sol2

Plots
  pg1: PlotGroup1D "1D Plot Group 1" | data = dset2
    lngr1: LineGraph on all domains | expr = u; xdata = expr; xdataexpr = x